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/batch
! ANSYS input file written by Workbench version 2025 R2
! File used for geometry attach: C:\Users\alami\Documents\Msc Civil Engineering\Year 2\Master Thesis\MSc-thesis---Minimal-model-of-the-Maeslantkering\ANSYS_FEM_truss\Truss_varying_cross_section_files\dp0\SYS\DM\SYS.agdb
/title,Truss_varying_cross_section--Modal (A5)
/COM,/COM,     ANSYSMotion, 2025.2
/com,--- Data in consistent MKS units. See Solving Units in the help system for more information.
/units,MKS
/prep7
! Turn off shape checking because checks already performed inside WB mesher.
! See help system for more information.
SHPP,OFF,,NOWARN
etcon,set             ! allow ANSYS to choose best KEYOP's for 180x elements, resets any applicable keyopt to MAPDL defaults
/com,*********** Send User Defined Coordinate System(s) ***********
csys,0
/com,*********** Nodes for the whole assembly ***********
nblock,3,,2362
(1i9,3e20.9e3)
        1     0.000000000E+00     0.000000000E+00     0.000000000E+00
        2     5.000000000E+00     0.000000000E+00     2.000000000E+01
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-1
/com,*********** Elements for Body 1 'Line Body' ***********
et,1,188
keyo,1,3,2
MAT,1 $ TYPE,1 $ REAL,1 $ SECNUM,1 $ ESYS,0
eblock,11,COMPACT,,11
(11i9)
        1        1        3     1040
        2        3        4     1041
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-1
secnum,1    ! reset the section ID to default
/com,*********** Elements for Body 2 'Line Body' ***********
et,2,188
keyo,2,3,2
MAT,2 $ TYPE,2 $ REAL,2 $ SECNUM,2 $ ESYS,0
eblock,11,COMPACT,,11
(11i9)
       12        2       14     1051
       13       14       15     1052
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-1
secnum,1    ! reset the section ID to default
/com,*********** Elements for Body 3 'Line Body' ***********
et,3,188
keyo,3,3,2
MAT,3 $ TYPE,3 $ REAL,3 $ SECNUM,3 $ ESYS,0
eblock,11,COMPACT,,11
(11i9)
       23       13       25     1062
       24       25       26     1063
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-1
secnum,1    ! reset the section ID to default
/com,*********** Elements for Body 4 'Line Body' ***********
et,4,188
keyo,4,3,2
MAT,4 $ TYPE,4 $ REAL,4 $ SECNUM,4 $ ESYS,0
eblock,11,COMPACT,,50
(11i9)
       34       35       37     1073
       35       37       38     1074
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-1
secnum,1    ! reset the section ID to default
/com,*********** Elements for Body 5 'Line Body' ***********
et,5,188
keyo,5,3,2
MAT,5 $ TYPE,5 $ REAL,5 $ SECNUM,5 $ ESYS,0
eblock,11,COMPACT,,10
(11i9)
       84       36       86     1123
       85       86       87     1124
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-1
secnum,1    ! reset the section ID to default
/com,*********** Elements for Body 6 'Line Body' ***********
et,6,188
keyo,6,3,2
MAT,6 $ TYPE,6 $ REAL,6 $ SECNUM,6 $ ESYS,0
eblock,11,COMPACT,,10
(11i9)
       94       85       96     1133
       95       96       97     1134
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-1
secnum,1    ! reset the section ID to default
/com,*********** Elements for Body 7 'Line Body' ***********
et,7,188
keyo,7,3,2
MAT,7 $ TYPE,7 $ REAL,7 $ SECNUM,7 $ ESYS,0
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/com,*********** Elements for Body 8 'Line Body' ***********
et,8,188
keyo,8,3,2
MAT,8 $ TYPE,8 $ REAL,8 $ SECNUM,8 $ ESYS,0
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/com,*********** Elements for Body 9 'Line Body' ***********
et,9,188
keyo,9,3,2
MAT,9 $ TYPE,9 $ REAL,9 $ SECNUM,9 $ ESYS,0
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/com,*********** Elements for Body 10 'Line Body' ***********
et,10,188
keyo,10,3,2
MAT,10 $ TYPE,10 $ REAL,10 $ SECNUM,10 $ ESYS,0
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/com,*********** Elements for Body 11 'Line Body' ***********
et,11,188
keyo,11,3,2
MAT,11 $ TYPE,11 $ REAL,11 $ SECNUM,11 $ ESYS,0
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/com,*********** Elements for Body 12 'Line Body' ***********
et,12,188
keyo,12,3,2
MAT,12 $ TYPE,12 $ REAL,12 $ SECNUM,12 $ ESYS,0
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/com,*********** Elements for Body 13 'Line Body' ***********
et,13,188
keyo,13,3,2
MAT,13 $ TYPE,13 $ REAL,13 $ SECNUM,13 $ ESYS,0
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/com,*********** Elements for Body 14 'Line Body' ***********
et,14,188
keyo,14,3,2
MAT,14 $ TYPE,14 $ REAL,14 $ SECNUM,14 $ ESYS,0
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/com,*********** Elements for Body 15 'Line Body' ***********
et,15,188
keyo,15,3,2
MAT,15 $ TYPE,15 $ REAL,15 $ SECNUM,15 $ ESYS,0
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/com,*********** Elements for Body 16 'Line Body' ***********
et,16,188
keyo,16,3,2
MAT,16 $ TYPE,16 $ REAL,16 $ SECNUM,16 $ ESYS,0
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/com,*********** Elements for Body 17 'Line Body' ***********
et,17,188
keyo,17,3,2
MAT,17 $ TYPE,17 $ REAL,17 $ SECNUM,17 $ ESYS,0
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/com,*********** Elements for Body 18 'Line Body' ***********
et,18,188
keyo,18,3,2
MAT,18 $ TYPE,18 $ REAL,18 $ SECNUM,18 $ ESYS,0
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/com,*********** Elements for Body 19 'Line Body' ***********
et,19,188
keyo,19,3,2
MAT,19 $ TYPE,19 $ REAL,19 $ SECNUM,19 $ ESYS,0
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/com,*********** Elements for Body 20 'Line Body' ***********
et,20,188
keyo,20,3,2
MAT,20 $ TYPE,20 $ REAL,20 $ SECNUM,20 $ ESYS,0
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/com,*********** Elements for Body 21 'Line Body' ***********
et,21,188
keyo,21,3,2
MAT,21 $ TYPE,21 $ REAL,21 $ SECNUM,21 $ ESYS,0
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/com,*********** Elements for Body 22 'Line Body' ***********
et,22,188
keyo,22,3,2
MAT,22 $ TYPE,22 $ REAL,22 $ SECNUM,22 $ ESYS,0
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/com,*********** Elements for Body 23 'Line Body' ***********
et,23,188
keyo,23,3,2
MAT,23 $ TYPE,23 $ REAL,23 $ SECNUM,23 $ ESYS,0
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/com,*********** Elements for Body 24 'Line Body' ***********
et,24,188
keyo,24,3,2
MAT,24 $ TYPE,24 $ REAL,24 $ SECNUM,24 $ ESYS,0
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et,25,188
keyo,25,3,2
MAT,25 $ TYPE,25 $ REAL,25 $ SECNUM,25 $ ESYS,0
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et,26,188
keyo,26,3,2
MAT,26 $ TYPE,26 $ REAL,26 $ SECNUM,26 $ ESYS,0
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et,27,188
keyo,27,3,2
MAT,27 $ TYPE,27 $ REAL,27 $ SECNUM,27 $ ESYS,0
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et,28,188
keyo,28,3,2
MAT,28 $ TYPE,28 $ REAL,28 $ SECNUM,28 $ ESYS,0
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et,29,188
keyo,29,3,2
MAT,29 $ TYPE,29 $ REAL,29 $ SECNUM,29 $ ESYS,0
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et,30,188
keyo,30,3,2
MAT,30 $ TYPE,30 $ REAL,30 $ SECNUM,30 $ ESYS,0
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et,31,188
keyo,31,3,2
MAT,31 $ TYPE,31 $ REAL,31 $ SECNUM,31 $ ESYS,0
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et,32,188
keyo,32,3,2
MAT,32 $ TYPE,32 $ REAL,32 $ SECNUM,32 $ ESYS,0
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et,33,188
keyo,33,3,2
MAT,33 $ TYPE,33 $ REAL,33 $ SECNUM,33 $ ESYS,0
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et,34,188
keyo,34,3,2
MAT,34 $ TYPE,34 $ REAL,34 $ SECNUM,34 $ ESYS,0
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et,35,188
keyo,35,3,2
MAT,35 $ TYPE,35 $ REAL,35 $ SECNUM,35 $ ESYS,0
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et,36,188
keyo,36,3,2
MAT,36 $ TYPE,36 $ REAL,36 $ SECNUM,36 $ ESYS,0
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et,37,188
keyo,37,3,2
MAT,37 $ TYPE,37 $ REAL,37 $ SECNUM,37 $ ESYS,0
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et,38,188
keyo,38,3,2
MAT,38 $ TYPE,38 $ REAL,38 $ SECNUM,38 $ ESYS,0
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et,39,188
keyo,39,3,2
MAT,39 $ TYPE,39 $ REAL,39 $ SECNUM,39 $ ESYS,0
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et,40,188
keyo,40,3,2
MAT,40 $ TYPE,40 $ REAL,40 $ SECNUM,40 $ ESYS,0
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et,41,188
keyo,41,3,2
MAT,41 $ TYPE,41 $ REAL,41 $ SECNUM,41 $ ESYS,0
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et,42,188
keyo,42,3,2
MAT,42 $ TYPE,42 $ REAL,42 $ SECNUM,42 $ ESYS,0
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et,43,188
keyo,43,3,2
MAT,43 $ TYPE,43 $ REAL,43 $ SECNUM,43 $ ESYS,0
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et,44,188
keyo,44,3,2
MAT,44 $ TYPE,44 $ REAL,44 $ SECNUM,44 $ ESYS,0
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et,45,188
keyo,45,3,2
MAT,45 $ TYPE,45 $ REAL,45 $ SECNUM,45 $ ESYS,0
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et,46,188
keyo,46,3,2
MAT,46 $ TYPE,46 $ REAL,46 $ SECNUM,46 $ ESYS,0
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et,47,188
keyo,47,3,2
MAT,47 $ TYPE,47 $ REAL,47 $ SECNUM,47 $ ESYS,0
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et,48,188
keyo,48,3,2
MAT,48 $ TYPE,48 $ REAL,48 $ SECNUM,48 $ ESYS,0
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et,49,188
keyo,49,3,2
MAT,49 $ TYPE,49 $ REAL,49 $ SECNUM,49 $ ESYS,0
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et,50,188
keyo,50,3,2
MAT,50 $ TYPE,50 $ REAL,50 $ SECNUM,50 $ ESYS,0
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et,51,188
keyo,51,3,2
MAT,51 $ TYPE,51 $ REAL,51 $ SECNUM,51 $ ESYS,0
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et,52,188
keyo,52,3,2
MAT,52 $ TYPE,52 $ REAL,52 $ SECNUM,52 $ ESYS,0
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et,53,188
keyo,53,3,2
MAT,53 $ TYPE,53 $ REAL,53 $ SECNUM,53 $ ESYS,0
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et,54,188
keyo,54,3,2
MAT,54 $ TYPE,54 $ REAL,54 $ SECNUM,54 $ ESYS,0
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et,55,188
keyo,55,3,2
MAT,55 $ TYPE,55 $ REAL,55 $ SECNUM,55 $ ESYS,0
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et,56,188
keyo,56,3,2
MAT,56 $ TYPE,56 $ REAL,56 $ SECNUM,56 $ ESYS,0
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et,57,188
keyo,57,3,2
MAT,57 $ TYPE,57 $ REAL,57 $ SECNUM,57 $ ESYS,0
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et,58,188
keyo,58,3,2
MAT,58 $ TYPE,58 $ REAL,58 $ SECNUM,58 $ ESYS,0
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et,59,188
keyo,59,3,2
MAT,59 $ TYPE,59 $ REAL,59 $ SECNUM,59 $ ESYS,0
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et,60,188
keyo,60,3,2
MAT,60 $ TYPE,60 $ REAL,60 $ SECNUM,60 $ ESYS,0
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et,61,188
keyo,61,3,2
MAT,61 $ TYPE,61 $ REAL,61 $ SECNUM,61 $ ESYS,0
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toffst,273.15,      ! Temperature offset from absolute zero
/com,*********** Set Reference Temperature ***********
tref,22.
/com,*********** Send Materials ***********
Temperature = 'TEMP' ! Temperature
MP,DENS,1,7850,	! kg m^-3
MP,ALPX,1,1.2e-05,	! C^-1
MP,C,1,434,	! J kg^-1 C^-1
MP,KXX,1,60.5,	! W m^-1 C^-1
MP,RSVX,1,1.7e-07,	! kg m^3 A^-2 s^-3
MP,EX,1,200000000000,	! Pa
MP,NUXY,1,0.3,
MP,MURX,1,10000,

Temperature = 'TEMP' ! Temperature
MP,DENS,2,7850,	! kg m^-3
MP,ALPX,2,1.2e-05,	! C^-1
MP,C,2,434,	! J kg^-1 C^-1
MP,KXX,2,60.5,	! W m^-1 C^-1
MP,RSVX,2,1.7e-07,	! kg m^3 A^-2 s^-3
MP,EX,2,200000000000,	! Pa
MP,NUXY,2,0.3,
MP,MURX,2,10000,

Temperature = 'TEMP' ! Temperature
MP,DENS,3,7850,	! kg m^-3
MP,ALPX,3,1.2e-05,	! C^-1
MP,C,3,434,	! J kg^-1 C^-1
MP,KXX,3,60.5,	! W m^-1 C^-1
MP,RSVX,3,1.7e-07,	! kg m^3 A^-2 s^-3
MP,EX,3,200000000000,	! Pa
MP,NUXY,3,0.3,
MP,MURX,3,10000,

Temperature = 'TEMP' ! Temperature
MP,DENS,4,7850,	! kg m^-3
MP,ALPX,4,1.2e-05,	! C^-1
MP,C,4,434,	! J kg^-1 C^-1
MP,KXX,4,60.5,	! W m^-1 C^-1
MP,RSVX,4,1.7e-07,	! kg m^3 A^-2 s^-3
MP,EX,4,200000000000,	! Pa
MP,NUXY,4,0.3,
MP,MURX,4,10000,

Temperature = 'TEMP' ! Temperature
MP,DENS,5,7850,	! kg m^-3
MP,ALPX,5,1.2e-05,	! C^-1
MP,C,5,434,	! J kg^-1 C^-1
MP,KXX,5,60.5,	! W m^-1 C^-1
MP,RSVX,5,1.7e-07,	! kg m^3 A^-2 s^-3
MP,EX,5,200000000000,	! Pa
MP,NUXY,5,0.3,
MP,MURX,5,10000,

Temperature = 'TEMP' ! Temperature
MP,DENS,6,7850,	! kg m^-3
MP,ALPX,6,1.2e-05,	! C^-1
MP,C,6,434,	! J kg^-1 C^-1
MP,KXX,6,60.5,	! W m^-1 C^-1
MP,RSVX,6,1.7e-07,	! kg m^3 A^-2 s^-3
MP,EX,6,200000000000,	! Pa
MP,NUXY,6,0.3,
MP,MURX,6,10000,

Temperature = 'TEMP' ! Temperature
MP,DENS,7,7850,	! kg m^-3
MP,ALPX,7,1.2e-05,	! C^-1
MP,C,7,434,	! J kg^-1 C^-1
MP,KXX,7,60.5,	! W m^-1 C^-1
MP,RSVX,7,1.7e-07,	! kg m^3 A^-2 s^-3
MP,EX,7,200000000000,	! Pa
MP,NUXY,7,0.3,
MP,MURX,7,10000,

Temperature = 'TEMP' ! Temperature
MP,DENS,8,7850,	! kg m^-3
MP,ALPX,8,1.2e-05,	! C^-1
MP,C,8,434,	! J kg^-1 C^-1
MP,KXX,8,60.5,	! W m^-1 C^-1
MP,RSVX,8,1.7e-07,	! kg m^3 A^-2 s^-3
MP,EX,8,200000000000,	! Pa
MP,NUXY,8,0.3,
MP,MURX,8,10000,

Temperature = 'TEMP' ! Temperature
MP,DENS,9,7850,	! kg m^-3
MP,ALPX,9,1.2e-05,	! C^-1
MP,C,9,434,	! J kg^-1 C^-1
MP,KXX,9,60.5,	! W m^-1 C^-1
MP,RSVX,9,1.7e-07,	! kg m^3 A^-2 s^-3
MP,EX,9,200000000000,	! Pa
MP,NUXY,9,0.3,
MP,MURX,9,10000,

Temperature = 'TEMP' ! Temperature
MP,DENS,10,7850,	! kg m^-3
MP,ALPX,10,1.2e-05,	! C^-1
MP,C,10,434,	! J kg^-1 C^-1
MP,KXX,10,60.5,	! W m^-1 C^-1
MP,RSVX,10,1.7e-07,	! kg m^3 A^-2 s^-3
MP,EX,10,200000000000,	! Pa
MP,NUXY,10,0.3,
MP,MURX,10,10000,

Temperature = 'TEMP' ! Temperature
MP,DENS,11,7850,	! kg m^-3
MP,ALPX,11,1.2e-05,	! C^-1
MP,C,11,434,	! J kg^-1 C^-1
MP,KXX,11,60.5,	! W m^-1 C^-1
MP,RSVX,11,1.7e-07,	! kg m^3 A^-2 s^-3
MP,EX,11,200000000000,	! Pa
MP,NUXY,11,0.3,
MP,MURX,11,10000,

Temperature = 'TEMP' ! Temperature
MP,DENS,12,7850,	! kg m^-3
MP,ALPX,12,1.2e-05,	! C^-1
MP,C,12,434,	! J kg^-1 C^-1
MP,KXX,12,60.5,	! W m^-1 C^-1
MP,RSVX,12,1.7e-07,	! kg m^3 A^-2 s^-3
MP,EX,12,200000000000,	! Pa
MP,NUXY,12,0.3,
MP,MURX,12,10000,

Temperature = 'TEMP' ! Temperature
MP,DENS,13,7850,	! kg m^-3
MP,ALPX,13,1.2e-05,	! C^-1
MP,C,13,434,	! J kg^-1 C^-1
MP,KXX,13,60.5,	! W m^-1 C^-1
MP,RSVX,13,1.7e-07,	! kg m^3 A^-2 s^-3
MP,EX,13,200000000000,	! Pa
MP,NUXY,13,0.3,
MP,MURX,13,10000,

Temperature = 'TEMP' ! Temperature
MP,DENS,14,7850,	! kg m^-3
MP,ALPX,14,1.2e-05,	! C^-1
MP,C,14,434,	! J kg^-1 C^-1
MP,KXX,14,60.5,	! W m^-1 C^-1
MP,RSVX,14,1.7e-07,	! kg m^3 A^-2 s^-3
MP,EX,14,200000000000,	! Pa
MP,NUXY,14,0.3,
MP,MURX,14,10000,

Temperature = 'TEMP' ! Temperature
MP,DENS,15,7850,	! kg m^-3
MP,ALPX,15,1.2e-05,	! C^-1
MP,C,15,434,	! J kg^-1 C^-1
MP,KXX,15,60.5,	! W m^-1 C^-1
MP,RSVX,15,1.7e-07,	! kg m^3 A^-2 s^-3
MP,EX,15,200000000000,	! Pa
MP,NUXY,15,0.3,
MP,MURX,15,10000,

Temperature = 'TEMP' ! Temperature
MP,DENS,16,7850,	! kg m^-3
MP,ALPX,16,1.2e-05,	! C^-1
MP,C,16,434,	! J kg^-1 C^-1
MP,KXX,16,60.5,	! W m^-1 C^-1
MP,RSVX,16,1.7e-07,	! kg m^3 A^-2 s^-3
MP,EX,16,200000000000,	! Pa
MP,NUXY,16,0.3,
MP,MURX,16,10000,

Temperature = 'TEMP' ! Temperature
MP,DENS,17,7850,	! kg m^-3
MP,ALPX,17,1.2e-05,	! C^-1
MP,C,17,434,	! J kg^-1 C^-1
MP,KXX,17,60.5,	! W m^-1 C^-1
MP,RSVX,17,1.7e-07,	! kg m^3 A^-2 s^-3
MP,EX,17,200000000000,	! Pa
MP,NUXY,17,0.3,
MP,MURX,17,10000,

Temperature = 'TEMP' ! Temperature
MP,DENS,18,7850,	! kg m^-3
MP,ALPX,18,1.2e-05,	! C^-1
MP,C,18,434,	! J kg^-1 C^-1
MP,KXX,18,60.5,	! W m^-1 C^-1
MP,RSVX,18,1.7e-07,	! kg m^3 A^-2 s^-3
MP,EX,18,200000000000,	! Pa
MP,NUXY,18,0.3,
MP,MURX,18,10000,

Temperature = 'TEMP' ! Temperature
MP,DENS,19,7850,	! kg m^-3
MP,ALPX,19,1.2e-05,	! C^-1
MP,C,19,434,	! J kg^-1 C^-1
MP,KXX,19,60.5,	! W m^-1 C^-1
MP,RSVX,19,1.7e-07,	! kg m^3 A^-2 s^-3
MP,EX,19,200000000000,	! Pa
MP,NUXY,19,0.3,
MP,MURX,19,10000,

Temperature = 'TEMP' ! Temperature
MP,DENS,20,7850,	! kg m^-3
MP,ALPX,20,1.2e-05,	! C^-1
MP,C,20,434,	! J kg^-1 C^-1
MP,KXX,20,60.5,	! W m^-1 C^-1
MP,RSVX,20,1.7e-07,	! kg m^3 A^-2 s^-3
MP,EX,20,200000000000,	! Pa
MP,NUXY,20,0.3,
MP,MURX,20,10000,

Temperature = 'TEMP' ! Temperature
MP,DENS,21,7850,	! kg m^-3
MP,ALPX,21,1.2e-05,	! C^-1
MP,C,21,434,	! J kg^-1 C^-1
MP,KXX,21,60.5,	! W m^-1 C^-1
MP,RSVX,21,1.7e-07,	! kg m^3 A^-2 s^-3
MP,EX,21,200000000000,	! Pa
MP,NUXY,21,0.3,
MP,MURX,21,10000,

Temperature = 'TEMP' ! Temperature
MP,DENS,22,7850,	! kg m^-3
MP,ALPX,22,1.2e-05,	! C^-1
MP,C,22,434,	! J kg^-1 C^-1
MP,KXX,22,60.5,	! W m^-1 C^-1
MP,RSVX,22,1.7e-07,	! kg m^3 A^-2 s^-3
MP,EX,22,200000000000,	! Pa
MP,NUXY,22,0.3,
MP,MURX,22,10000,

Temperature = 'TEMP' ! Temperature
MP,DENS,23,7850,	! kg m^-3
MP,ALPX,23,1.2e-05,	! C^-1
MP,C,23,434,	! J kg^-1 C^-1
MP,KXX,23,60.5,	! W m^-1 C^-1
MP,RSVX,23,1.7e-07,	! kg m^3 A^-2 s^-3
MP,EX,23,200000000000,	! Pa
MP,NUXY,23,0.3,
MP,MURX,23,10000,

Temperature = 'TEMP' ! Temperature
MP,DENS,24,7850,	! kg m^-3
MP,ALPX,24,1.2e-05,	! C^-1
MP,C,24,434,	! J kg^-1 C^-1
MP,KXX,24,60.5,	! W m^-1 C^-1
MP,RSVX,24,1.7e-07,	! kg m^3 A^-2 s^-3
MP,EX,24,200000000000,	! Pa
MP,NUXY,24,0.3,
MP,MURX,24,10000,

Temperature = 'TEMP' ! Temperature
MP,DENS,25,7850,	! kg m^-3
MP,ALPX,25,1.2e-05,	! C^-1
MP,C,25,434,	! J kg^-1 C^-1
MP,KXX,25,60.5,	! W m^-1 C^-1
MP,RSVX,25,1.7e-07,	! kg m^3 A^-2 s^-3
MP,EX,25,200000000000,	! Pa
MP,NUXY,25,0.3,
MP,MURX,25,10000,

Temperature = 'TEMP' ! Temperature
MP,DENS,26,7850,	! kg m^-3
MP,ALPX,26,1.2e-05,	! C^-1
MP,C,26,434,	! J kg^-1 C^-1
MP,KXX,26,60.5,	! W m^-1 C^-1
MP,RSVX,26,1.7e-07,	! kg m^3 A^-2 s^-3
MP,EX,26,200000000000,	! Pa
MP,NUXY,26,0.3,
MP,MURX,26,10000,

Temperature = 'TEMP' ! Temperature
MP,DENS,27,7850,	! kg m^-3
MP,ALPX,27,1.2e-05,	! C^-1
MP,C,27,434,	! J kg^-1 C^-1
MP,KXX,27,60.5,	! W m^-1 C^-1
MP,RSVX,27,1.7e-07,	! kg m^3 A^-2 s^-3
MP,EX,27,200000000000,	! Pa
MP,NUXY,27,0.3,
MP,MURX,27,10000,

Temperature = 'TEMP' ! Temperature
MP,DENS,28,7850,	! kg m^-3
MP,ALPX,28,1.2e-05,	! C^-1
MP,C,28,434,	! J kg^-1 C^-1
MP,KXX,28,60.5,	! W m^-1 C^-1
MP,RSVX,28,1.7e-07,	! kg m^3 A^-2 s^-3
MP,EX,28,200000000000,	! Pa
MP,NUXY,28,0.3,
MP,MURX,28,10000,

Temperature = 'TEMP' ! Temperature
MP,DENS,29,7850,	! kg m^-3
MP,ALPX,29,1.2e-05,	! C^-1
MP,C,29,434,	! J kg^-1 C^-1
MP,KXX,29,60.5,	! W m^-1 C^-1
MP,RSVX,29,1.7e-07,	! kg m^3 A^-2 s^-3
MP,EX,29,200000000000,	! Pa
MP,NUXY,29,0.3,
MP,MURX,29,10000,

Temperature = 'TEMP' ! Temperature
MP,DENS,30,7850,	! kg m^-3
MP,ALPX,30,1.2e-05,	! C^-1
MP,C,30,434,	! J kg^-1 C^-1
MP,KXX,30,60.5,	! W m^-1 C^-1
MP,RSVX,30,1.7e-07,	! kg m^3 A^-2 s^-3
MP,EX,30,200000000000,	! Pa
MP,NUXY,30,0.3,
MP,MURX,30,10000,

Temperature = 'TEMP' ! Temperature
MP,DENS,31,7850,	! kg m^-3
MP,ALPX,31,1.2e-05,	! C^-1
MP,C,31,434,	! J kg^-1 C^-1
MP,KXX,31,60.5,	! W m^-1 C^-1
MP,RSVX,31,1.7e-07,	! kg m^3 A^-2 s^-3
MP,EX,31,200000000000,	! Pa
MP,NUXY,31,0.3,
MP,MURX,31,10000,

Temperature = 'TEMP' ! Temperature
MP,DENS,32,7850,	! kg m^-3
MP,ALPX,32,1.2e-05,	! C^-1
MP,C,32,434,	! J kg^-1 C^-1
MP,KXX,32,60.5,	! W m^-1 C^-1
MP,RSVX,32,1.7e-07,	! kg m^3 A^-2 s^-3
MP,EX,32,200000000000,	! Pa
MP,NUXY,32,0.3,
MP,MURX,32,10000,

Temperature = 'TEMP' ! Temperature
MP,DENS,33,7850,	! kg m^-3
MP,ALPX,33,1.2e-05,	! C^-1
MP,C,33,434,	! J kg^-1 C^-1
MP,KXX,33,60.5,	! W m^-1 C^-1
MP,RSVX,33,1.7e-07,	! kg m^3 A^-2 s^-3
MP,EX,33,200000000000,	! Pa
MP,NUXY,33,0.3,
MP,MURX,33,10000,

Temperature = 'TEMP' ! Temperature
MP,DENS,34,7850,	! kg m^-3
MP,ALPX,34,1.2e-05,	! C^-1
MP,C,34,434,	! J kg^-1 C^-1
MP,KXX,34,60.5,	! W m^-1 C^-1
MP,RSVX,34,1.7e-07,	! kg m^3 A^-2 s^-3
MP,EX,34,200000000000,	! Pa
MP,NUXY,34,0.3,
MP,MURX,34,10000,

Temperature = 'TEMP' ! Temperature
MP,DENS,35,7850,	! kg m^-3
MP,ALPX,35,1.2e-05,	! C^-1
MP,C,35,434,	! J kg^-1 C^-1
MP,KXX,35,60.5,	! W m^-1 C^-1
MP,RSVX,35,1.7e-07,	! kg m^3 A^-2 s^-3
MP,EX,35,200000000000,	! Pa
MP,NUXY,35,0.3,
MP,MURX,35,10000,

Temperature = 'TEMP' ! Temperature
MP,DENS,36,7850,	! kg m^-3
MP,ALPX,36,1.2e-05,	! C^-1
MP,C,36,434,	! J kg^-1 C^-1
MP,KXX,36,60.5,	! W m^-1 C^-1
MP,RSVX,36,1.7e-07,	! kg m^3 A^-2 s^-3
MP,EX,36,200000000000,	! Pa
MP,NUXY,36,0.3,
MP,MURX,36,10000,

Temperature = 'TEMP' ! Temperature
MP,DENS,37,7850,	! kg m^-3
MP,ALPX,37,1.2e-05,	! C^-1
MP,C,37,434,	! J kg^-1 C^-1
MP,KXX,37,60.5,	! W m^-1 C^-1
MP,RSVX,37,1.7e-07,	! kg m^3 A^-2 s^-3
MP,EX,37,200000000000,	! Pa
MP,NUXY,37,0.3,
MP,MURX,37,10000,

Temperature = 'TEMP' ! Temperature
MP,DENS,38,7850,	! kg m^-3
MP,ALPX,38,1.2e-05,	! C^-1
MP,C,38,434,	! J kg^-1 C^-1
MP,KXX,38,60.5,	! W m^-1 C^-1
MP,RSVX,38,1.7e-07,	! kg m^3 A^-2 s^-3
MP,EX,38,200000000000,	! Pa
MP,NUXY,38,0.3,
MP,MURX,38,10000,

Temperature = 'TEMP' ! Temperature
MP,DENS,39,7850,	! kg m^-3
MP,ALPX,39,1.2e-05,	! C^-1
MP,C,39,434,	! J kg^-1 C^-1
MP,KXX,39,60.5,	! W m^-1 C^-1
MP,RSVX,39,1.7e-07,	! kg m^3 A^-2 s^-3
MP,EX,39,200000000000,	! Pa
MP,NUXY,39,0.3,
MP,MURX,39,10000,

Temperature = 'TEMP' ! Temperature
MP,DENS,40,7850,	! kg m^-3
MP,ALPX,40,1.2e-05,	! C^-1
MP,C,40,434,	! J kg^-1 C^-1
MP,KXX,40,60.5,	! W m^-1 C^-1
MP,RSVX,40,1.7e-07,	! kg m^3 A^-2 s^-3
MP,EX,40,200000000000,	! Pa
MP,NUXY,40,0.3,
MP,MURX,40,10000,

Temperature = 'TEMP' ! Temperature
MP,DENS,41,7850,	! kg m^-3
MP,ALPX,41,1.2e-05,	! C^-1
MP,C,41,434,	! J kg^-1 C^-1
MP,KXX,41,60.5,	! W m^-1 C^-1
MP,RSVX,41,1.7e-07,	! kg m^3 A^-2 s^-3
MP,EX,41,200000000000,	! Pa
MP,NUXY,41,0.3,
MP,MURX,41,10000,

Temperature = 'TEMP' ! Temperature
MP,DENS,42,7850,	! kg m^-3
MP,ALPX,42,1.2e-05,	! C^-1
MP,C,42,434,	! J kg^-1 C^-1
MP,KXX,42,60.5,	! W m^-1 C^-1
MP,RSVX,42,1.7e-07,	! kg m^3 A^-2 s^-3
MP,EX,42,200000000000,	! Pa
MP,NUXY,42,0.3,
MP,MURX,42,10000,

Temperature = 'TEMP' ! Temperature
MP,DENS,43,7850,	! kg m^-3
MP,ALPX,43,1.2e-05,	! C^-1
MP,C,43,434,	! J kg^-1 C^-1
MP,KXX,43,60.5,	! W m^-1 C^-1
MP,RSVX,43,1.7e-07,	! kg m^3 A^-2 s^-3
MP,EX,43,200000000000,	! Pa
MP,NUXY,43,0.3,
MP,MURX,43,10000,

Temperature = 'TEMP' ! Temperature
MP,DENS,44,7850,	! kg m^-3
MP,ALPX,44,1.2e-05,	! C^-1
MP,C,44,434,	! J kg^-1 C^-1
MP,KXX,44,60.5,	! W m^-1 C^-1
MP,RSVX,44,1.7e-07,	! kg m^3 A^-2 s^-3
MP,EX,44,200000000000,	! Pa
MP,NUXY,44,0.3,
MP,MURX,44,10000,

Temperature = 'TEMP' ! Temperature
MP,DENS,45,7850,	! kg m^-3
MP,ALPX,45,1.2e-05,	! C^-1
MP,C,45,434,	! J kg^-1 C^-1
MP,KXX,45,60.5,	! W m^-1 C^-1
MP,RSVX,45,1.7e-07,	! kg m^3 A^-2 s^-3
MP,EX,45,200000000000,	! Pa
MP,NUXY,45,0.3,
MP,MURX,45,10000,

Temperature = 'TEMP' ! Temperature
MP,DENS,46,7850,	! kg m^-3
MP,ALPX,46,1.2e-05,	! C^-1
MP,C,46,434,	! J kg^-1 C^-1
MP,KXX,46,60.5,	! W m^-1 C^-1
MP,RSVX,46,1.7e-07,	! kg m^3 A^-2 s^-3
MP,EX,46,200000000000,	! Pa
MP,NUXY,46,0.3,
MP,MURX,46,10000,

Temperature = 'TEMP' ! Temperature
MP,DENS,47,7850,	! kg m^-3
MP,ALPX,47,1.2e-05,	! C^-1
MP,C,47,434,	! J kg^-1 C^-1
MP,KXX,47,60.5,	! W m^-1 C^-1
MP,RSVX,47,1.7e-07,	! kg m^3 A^-2 s^-3
MP,EX,47,200000000000,	! Pa
MP,NUXY,47,0.3,
MP,MURX,47,10000,

Temperature = 'TEMP' ! Temperature
MP,DENS,48,7850,	! kg m^-3
MP,ALPX,48,1.2e-05,	! C^-1
MP,C,48,434,	! J kg^-1 C^-1
MP,KXX,48,60.5,	! W m^-1 C^-1
MP,RSVX,48,1.7e-07,	! kg m^3 A^-2 s^-3
MP,EX,48,200000000000,	! Pa
MP,NUXY,48,0.3,
MP,MURX,48,10000,

Temperature = 'TEMP' ! Temperature
MP,DENS,49,7850,	! kg m^-3
MP,ALPX,49,1.2e-05,	! C^-1
MP,C,49,434,	! J kg^-1 C^-1
MP,KXX,49,60.5,	! W m^-1 C^-1
MP,RSVX,49,1.7e-07,	! kg m^3 A^-2 s^-3
MP,EX,49,200000000000,	! Pa
MP,NUXY,49,0.3,
MP,MURX,49,10000,

Temperature = 'TEMP' ! Temperature
MP,DENS,50,7850,	! kg m^-3
MP,ALPX,50,1.2e-05,	! C^-1
MP,C,50,434,	! J kg^-1 C^-1
MP,KXX,50,60.5,	! W m^-1 C^-1
MP,RSVX,50,1.7e-07,	! kg m^3 A^-2 s^-3
MP,EX,50,200000000000,	! Pa
MP,NUXY,50,0.3,
MP,MURX,50,10000,

Temperature = 'TEMP' ! Temperature
MP,DENS,51,7850,	! kg m^-3
MP,ALPX,51,1.2e-05,	! C^-1
MP,C,51,434,	! J kg^-1 C^-1
MP,KXX,51,60.5,	! W m^-1 C^-1
MP,RSVX,51,1.7e-07,	! kg m^3 A^-2 s^-3
MP,EX,51,200000000000,	! Pa
MP,NUXY,51,0.3,
MP,MURX,51,10000,

Temperature = 'TEMP' ! Temperature
MP,DENS,52,7850,	! kg m^-3
MP,ALPX,52,1.2e-05,	! C^-1
MP,C,52,434,	! J kg^-1 C^-1
MP,KXX,52,60.5,	! W m^-1 C^-1
MP,RSVX,52,1.7e-07,	! kg m^3 A^-2 s^-3
MP,EX,52,200000000000,	! Pa
MP,NUXY,52,0.3,
MP,MURX,52,10000,

Temperature = 'TEMP' ! Temperature
MP,DENS,53,7850,	! kg m^-3
MP,ALPX,53,1.2e-05,	! C^-1
MP,C,53,434,	! J kg^-1 C^-1
MP,KXX,53,60.5,	! W m^-1 C^-1
MP,RSVX,53,1.7e-07,	! kg m^3 A^-2 s^-3
MP,EX,53,200000000000,	! Pa
MP,NUXY,53,0.3,
MP,MURX,53,10000,

Temperature = 'TEMP' ! Temperature
MP,DENS,54,7850,	! kg m^-3
MP,ALPX,54,1.2e-05,	! C^-1
MP,C,54,434,	! J kg^-1 C^-1
MP,KXX,54,60.5,	! W m^-1 C^-1
MP,RSVX,54,1.7e-07,	! kg m^3 A^-2 s^-3
MP,EX,54,200000000000,	! Pa
MP,NUXY,54,0.3,
MP,MURX,54,10000,

Temperature = 'TEMP' ! Temperature
MP,DENS,55,7850,	! kg m^-3
MP,ALPX,55,1.2e-05,	! C^-1
MP,C,55,434,	! J kg^-1 C^-1
MP,KXX,55,60.5,	! W m^-1 C^-1
MP,RSVX,55,1.7e-07,	! kg m^3 A^-2 s^-3
MP,EX,55,200000000000,	! Pa
MP,NUXY,55,0.3,
MP,MURX,55,10000,

Temperature = 'TEMP' ! Temperature
MP,DENS,56,7850,	! kg m^-3
MP,ALPX,56,1.2e-05,	! C^-1
MP,C,56,434,	! J kg^-1 C^-1
MP,KXX,56,60.5,	! W m^-1 C^-1
MP,RSVX,56,1.7e-07,	! kg m^3 A^-2 s^-3
MP,EX,56,200000000000,	! Pa
MP,NUXY,56,0.3,
MP,MURX,56,10000,

Temperature = 'TEMP' ! Temperature
MP,DENS,57,7850,	! kg m^-3
MP,ALPX,57,1.2e-05,	! C^-1
MP,C,57,434,	! J kg^-1 C^-1
MP,KXX,57,60.5,	! W m^-1 C^-1
MP,RSVX,57,1.7e-07,	! kg m^3 A^-2 s^-3
MP,EX,57,200000000000,	! Pa
MP,NUXY,57,0.3,
MP,MURX,57,10000,

Temperature = 'TEMP' ! Temperature
MP,DENS,58,7850,	! kg m^-3
MP,ALPX,58,1.2e-05,	! C^-1
MP,C,58,434,	! J kg^-1 C^-1
MP,KXX,58,60.5,	! W m^-1 C^-1
MP,RSVX,58,1.7e-07,	! kg m^3 A^-2 s^-3
MP,EX,58,200000000000,	! Pa
MP,NUXY,58,0.3,
MP,MURX,58,10000,

Temperature = 'TEMP' ! Temperature
MP,DENS,59,7850,	! kg m^-3
MP,ALPX,59,1.2e-05,	! C^-1
MP,C,59,434,	! J kg^-1 C^-1
MP,KXX,59,60.5,	! W m^-1 C^-1
MP,RSVX,59,1.7e-07,	! kg m^3 A^-2 s^-3
MP,EX,59,200000000000,	! Pa
MP,NUXY,59,0.3,
MP,MURX,59,10000,

Temperature = 'TEMP' ! Temperature
MP,DENS,60,7850,	! kg m^-3
MP,ALPX,60,1.2e-05,	! C^-1
MP,C,60,434,	! J kg^-1 C^-1
MP,KXX,60,60.5,	! W m^-1 C^-1
MP,RSVX,60,1.7e-07,	! kg m^3 A^-2 s^-3
MP,EX,60,200000000000,	! Pa
MP,NUXY,60,0.3,
MP,MURX,60,10000,

Temperature = 'TEMP' ! Temperature
MP,DENS,61,7850,	! kg m^-3
MP,ALPX,61,1.2e-05,	! C^-1
MP,C,61,434,	! J kg^-1 C^-1
MP,KXX,61,60.5,	! W m^-1 C^-1
MP,RSVX,61,1.7e-07,	! kg m^3 A^-2 s^-3
MP,EX,61,200000000000,	! Pa
MP,NUXY,61,0.3,
MP,MURX,61,10000,

/com,*********** Send Beam Properties ***********
SECTYPE,1,BEAM,CTUB
SECDATA,1.715,1.8
secoffset,cent

SECTYPE,2,BEAM,CTUB
SECDATA,1.715,1.8
secoffset,cent

SECTYPE,3,BEAM,CTUB
SECDATA,1.73,1.8
secoffset,cent

SECTYPE,4,BEAM,CTUB
SECDATA,1.74,1.8
secoffset,cent

SECTYPE,5,BEAM,CTUB
SECDATA,1.735,1.8
secoffset,cent

SECTYPE,6,BEAM,CTUB
SECDATA,1.73,1.8
secoffset,cent

SECTYPE,7,BEAM,CTUB
SECDATA,1.76,1.8
secoffset,cent

SECTYPE,8,BEAM,CTUB
SECDATA,1.745,1.8
secoffset,cent

SECTYPE,9,BEAM,CTUB
SECDATA,1.71,1.8
secoffset,cent

SECTYPE,10,BEAM,CTUB
SECDATA,1.71,1.8
secoffset,cent

SECTYPE,11,BEAM,CTUB
SECDATA,1.721,1.8
secoffset,cent

SECTYPE,12,BEAM,CTUB
SECDATA,1.73,1.8
secoffset,cent

SECTYPE,13,BEAM,CTUB
SECDATA,1.725,1.8
secoffset,cent

SECTYPE,14,BEAM,CTUB
SECDATA,1.721,1.8
secoffset,cent

SECTYPE,15,BEAM,CTUB
SECDATA,1.75,1.8
secoffset,cent

SECTYPE,16,BEAM,CTUB
SECDATA,1.735,1.8
secoffset,cent

SECTYPE,17,BEAM,CTUB
SECDATA,0.784,0.8
secoffset,cent

SECTYPE,18,BEAM,CTUB
SECDATA,0.588,0.6
secoffset,cent

SECTYPE,19,BEAM,CTUB
SECDATA,0.784,0.8
secoffset,cent

SECTYPE,20,BEAM,CTUB
SECDATA,1.76,1.8
secoffset,cent

SECTYPE,21,BEAM,CTUB
SECDATA,0.78,0.8
secoffset,cent

SECTYPE,22,BEAM,CTUB
SECDATA,0.588,0.6
secoffset,cent

SECTYPE,23,BEAM,CTUB
SECDATA,0.784,0.8
secoffset,cent

SECTYPE,24,BEAM,CTUB
SECDATA,0.588,0.6
secoffset,cent

SECTYPE,25,BEAM,CTUB
SECDATA,0.784,0.8
secoffset,cent

SECTYPE,26,BEAM,CTUB
SECDATA,0.588,0.6
secoffset,cent

SECTYPE,27,BEAM,CTUB
SECDATA,0.784,0.8
secoffset,cent

SECTYPE,28,BEAM,CTUB
SECDATA,0.588,0.6
secoffset,cent

SECTYPE,29,BEAM,CTUB
SECDATA,0.784,0.8
secoffset,cent

SECTYPE,30,BEAM,CTUB
SECDATA,0.588,0.6
secoffset,cent

SECTYPE,31,BEAM,CTUB
SECDATA,0.784,0.8
secoffset,cent

SECTYPE,32,BEAM,CTUB
SECDATA,0.588,0.6
secoffset,cent

SECTYPE,33,BEAM,CTUB
SECDATA,0.784,0.8
secoffset,cent

SECTYPE,34,BEAM,CTUB
SECDATA,0.588,0.6
secoffset,cent

SECTYPE,35,BEAM,CTUB
SECDATA,0.784,0.8
secoffset,cent

SECTYPE,36,BEAM,CTUB
SECDATA,0.77,0.8
secoffset,cent

SECTYPE,37,BEAM,CTUB
SECDATA,0.784,0.8
secoffset,cent

SECTYPE,38,BEAM,CTUB
SECDATA,0.784,0.8
secoffset,cent

SECTYPE,39,BEAM,CTUB
SECDATA,1.76,1.8
secoffset,cent

SECTYPE,40,BEAM,CTUB
SECDATA,1.75,1.8
secoffset,cent

SECTYPE,41,BEAM,CTUB
SECDATA,1.74,1.8
secoffset,cent

SECTYPE,42,BEAM,CTUB
SECDATA,1.735,1.8
secoffset,cent

SECTYPE,43,BEAM,CTUB
SECDATA,1.745,1.8
secoffset,cent

SECTYPE,44,BEAM,CTUB
SECDATA,1.71,1.8
secoffset,cent

SECTYPE,45,BEAM,CTUB
SECDATA,0.78,0.8
secoffset,cent

SECTYPE,46,BEAM,CTUB
SECDATA,0.78,0.8
secoffset,cent

SECTYPE,47,BEAM,CTUB
SECDATA,0.784,0.8
secoffset,cent

SECTYPE,48,BEAM,CTUB
SECDATA,0.78,0.8
secoffset,cent

SECTYPE,49,BEAM,CTUB
SECDATA,0.784,0.8
secoffset,cent

SECTYPE,50,BEAM,CTUB
SECDATA,0.78,0.8
secoffset,cent

SECTYPE,51,BEAM,CTUB
SECDATA,0.77,0.8
secoffset,cent

SECTYPE,52,BEAM,CTUB
SECDATA,0.78,0.8
secoffset,cent

SECTYPE,53,BEAM,CTUB
SECDATA,0.784,0.8
secoffset,cent

SECTYPE,54,BEAM,CTUB
SECDATA,0.784,0.8
secoffset,cent

SECTYPE,55,BEAM,CTUB
SECDATA,0.78,0.8
secoffset,cent

SECTYPE,56,BEAM,CTUB
SECDATA,0.784,0.8
secoffset,cent

SECTYPE,57,BEAM,CTUB
SECDATA,0.78,0.8
secoffset,cent

SECTYPE,58,BEAM,CTUB
SECDATA,0.784,0.8
secoffset,cent

SECTYPE,59,BEAM,CTUB
SECDATA,0.78,0.8
secoffset,cent

SECTYPE,60,BEAM,CTUB
SECDATA,0.77,0.8
secoffset,cent

SECTYPE,61,BEAM,CTUB
SECDATA,0.77,0.8
secoffset,cent

!************************* Model Summary ********************
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!Line Body,	Structural Steel,	matid,	61
!************************* End Model Summary ********************
/com,******* Constant Zero Displacement X *******
CMBLOCK,_DISPZEROUX,NODE,        8
(8i10)
         1       115       235       544       565      -573      1021     -1027
cmsel,s,_DISPZEROUX
d,all,ux,0
nsel,all
/com,******* Constant Zero Displacement Y *******
CMBLOCK,_DISPZEROUY,NODE,        8
(8i10)
         1       115       235       544       565      -573      1021     -1027
cmsel,s,_DISPZEROUY
d,all,uy,0
nsel,all
/com,******* Constant Zero Displacement Z *******
CMBLOCK,_DISPZEROUZ,NODE,        8
(8i10)
         1       115       235       544       565      -573      1021     -1027
cmsel,s,_DISPZEROUZ
d,all,uz,0
nsel,all
fini
/solu
antype,2                   ! modal analysis
_thickRatio=  0     ! Ratio of thick parts in the model
thexpand,off     ! ignore thermal strains
modopt,lanb,10
outres,erase
outres,all,none
outres,nsol,all
outres,nload,all,
esel,s,type,,1
esel,a,type,,2,61
cm,_elmisc,elem
esel,all
outres,misc,all,_elmisc
mxpand,,,,yes,,no             ! expand requested element results, but not write them to file.mode
dmpopt,esav,no
dmpopt,emat,no
dmpopt,full,no
! *********** WB SOLVE COMMAND ***********
! check interactive state
*get,ANSINTER_,active,,int
*if,ANSINTER_,ne,0,then
/eof
*endif
solve
/com *************** Write FE CONNECTORS *********
CEWRITE,file,ce,,INTE
*get,_nmodalsolproc,active,0,numcpu
fini
*get,_NSOLTHREADS,active,0,ntfs
*get,_NSOLPROCESSES,active,0,npfs
/post1
*dim,_direction,CHAR,6,1
_direction(1) = 'X'
_direction(2) = 'Y'
_direction(3) = 'Z'
_direction(4) = 'ROTX'
_direction(5) = 'ROTY'
_direction(6) = 'ROTZ'
*get,_lastLS,active,0,set,LSTP
*get,_beginset,active,0,set,nset,first,_lastLS
*get,_endset,active,0,set,nset,last,_lastLS
_nummodes = 0
*if,_endset,gt,0,then
_nummodes = _endset - _beginset + 1
*endif
*do,i_mode,1,_nummodes
   *do,j_component,1,6
			*get,PFACT_%i_mode%_%j_component%,MODE,%i_mode%,PFACT,,DIREC,_direction(%j_component%)
   *enddo
*enddo
*dim,_tmdirection,CHAR,6,1
_tmdirection(1) = 'X'
_tmdirection(2) = 'Y'
_tmdirection(3) = 'Z'
_tmdirection(4) = 'X'
_tmdirection(5) = 'Y'
_tmdirection(6) = 'Z'
*do,j_component,1,6
    *if,j_component,gt,3,then
        *get,TOTALMASS_%j_component%,ELEM,0,IOR,_tmdirection(%j_component%)
    *else
        *get,TOTALMASS_%j_component%,ELEM,0,MTOT,_tmdirection(%j_component%)
    *endif
*enddo
fini
